*Heading
*Preprint, echo=NO, model=NO, history=NO, contact=NO
**  ----------------------------------------------------------  **
*Node, nset=node_all
1	,	-14.98288835	,	-26.2235623
2	,	13.95419483	,	26.28261658
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**  ----------------------------------------------------------  **
*Element,Type=T3D2, elset=truss
1	,	1	,	539
2	,	1	,	820
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**  ----------------------------------------------------------  **
*User Element, Nodes=2, Type=VU2, Properties=4, Coordinates=2, Variables=20
	1, 2, 11
*Element, Type=VU2
10001	,	1	,	539
10002	,	1	,	820
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**  ----------------------------------------------------------  **
*Elset, elset=fracture
10018	,	10019	,	10020	,	10033	,	10034	,	10035	
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*Elset, elset=utruss
10001	,	10002	,	10003	,	10004	,	10005	,	10006	
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**  ----------------------------------------------------------  **
*Uel Property, Elset=fracture
	30000, 3.4, 0.01, 2, 1
*Uel Property, Elset=utruss
	30000, 400, 0.025, 2, 2
** <ES>, <FT>, <GF>, <LB>
**  ----------------------------------------------------------  **
** Section: Section-1
*Solid Section, elset=truss, material=truss
	1
**  ----------------------------------------------------------  **
*Material, name=truss
*Density
	1e-4
*Depvar, delete=16
     16,
     1,  E_Total, "total strain"
     11, PHI_A, "Phi plus (Model A)"
     14, H, "History variable"
     15, d, "phase field variable"
*User Defined Field
*User Material, constants=3
	30000,  3.8,  0.01, 10.0
** ea, ft, gf, lb
**  ----------------------------------------------------------  **
**
** PREDEFINED FIELDS
**
** Name: Predefined Field-1   Type: Void ratio
*Initial Conditions, type=field, variable=1
	node_all, 0.0
**  ----------------------------------------------------------  **
**
**
**  ----------------------------------------------------------  **
*Nset, nset=bottom
   12,   29,   81,  128,  419,  460
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*Nset, nset=top
    7,   68,  275,  293,  384,  396
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**  ----------------------------------------------------------  **
*Node
	10001, 0, 500
*Nset, nset=node_ref
	10001
*MPC
	BEAM, top, node_ref
**  ----------------------------------------------------------  **
*Amplitude, name=Amp-1
             0.,              0.,            1,              0.005
*Amplitude, name=Amp-2
             0.,             0.005,           5,              0.017
*Amplitude, name=Amp-3
             0.,             0.017,           10,             0.025
*Amplitude, name=Amp-4
             0.,             0.025,            20,             0.1
**  ----------------------------------------------------------  **
*Boundary
bottom, 1, 1
bottom, 2, 2
bottom, 3, 3
node_ref, 1, 1
**top, 3, 3
**  ----------------------------------------------------------  **
**
** STEP: Step-1
**
*Step, name=Step-1, nlgeom=YES
***Dynamic, Explicit
*Dynamic Temperature-displacement, Explicit
	, 0.001
*Bulk Viscosity
	0.6, 1.2
**
** BOUNDARY CONDITIONS
**
** OUTPUT REQUESTS
**
*Restart, write, number interval=1, time marks=NO
**
** FIELD OUTPUT: F-Output-1
**
*Output, field, time interval=0.001
*Node Output
	NT, U, RF
*Element Output, directions=YES
	FV, HFL, LE, PE, PEEQ, PEEQVAVG, PEVAVG, S, SDV, TEMP
**
** HISTORY OUTPUT: H-Output-1
**
*Output, history, variable=PRESELECT,time interval=0.001
*End Step
**  ----------------------------------------------------------  **
**
** STEP: Step-2
**
*Step, name=Step-2, nlgeom=YES
***Dynamic, Explicit
*Dynamic Temperature-displacement, Explicit
	, 1
*Bulk Viscosity
	0.6, 1.2
**
** BOUNDARY CONDITIONS
**
** Name: BC-2 Type: Displacement/Rotation
*Boundary, amplitude=Amp-1
	node_ref, 2, 2, 1
**
** OUTPUT REQUESTS
**
*Restart, write, number interval=1, time marks=NO
**
** FIELD OUTPUT: F-Output-1
**
*Output, field, time interval=1.0
*Node Output
	NT, U, RF
*Element Output, directions=YES
	FV, HFL, LE, PE, PEEQ, PEEQVAVG, PEVAVG, S, SDV, TEMP
**
** HISTORY OUTPUT: H-Output-1
**
*Output, history, variable=PRESELECT,time interval=1.0
*End Step
**  ----------------------------------------------------------  **
**
** STEP: Step-3
**
*Step, name=Step-3, nlgeom=YES
***Dynamic, Explicit
*Dynamic Temperature-displacement, Explicit
	, 5
*Bulk Viscosity
	0.6, 1.2
**
** BOUNDARY CONDITIONS
**
** Name: BC-2 Type: Displacement/Rotation
*Boundary, amplitude=Amp-2
	node_ref, 2, 2, 1
**
** OUTPUT REQUESTS
**
*Restart, write, number interval=1, time marks=NO
**
** FIELD OUTPUT: F-Output-1
**
*Output, field, time interval=1.0
*Node Output
	NT, U, RF
*Element Output, directions=YES
	FV, HFL, LE, PE, PEEQ, PEEQVAVG, PEVAVG, S, SDV, TEMP
**
** HISTORY OUTPUT: H-Output-1
**
*Output, history, variable=PRESELECT,time interval=1.0
*End Step
**  ----------------------------------------------------------  **
**
** STEP: Step-4
**
*Step, name=Step-4, nlgeom=YES
***Dynamic, Explicit
*Dynamic Temperature-displacement, Explicit
	, 10
*Bulk Viscosity
	0.6, 1.2
**
** BOUNDARY CONDITIONS
**
** Name: BC-2 Type: Displacement/Rotation
*Boundary, amplitude=Amp-3
	node_ref, 2, 2, 1
**
** OUTPUT REQUESTS
**
*Restart, write, number interval=1, time marks=NO
**
** FIELD OUTPUT: F-Output-1
**
*Output, field, time interval=1.0
*Node Output
	NT, U, RF
*Element Output, directions=YES
	FV, HFL, LE, PE, PEEQ, PEEQVAVG, PEVAVG, S, SDV, TEMP
**
** HISTORY OUTPUT: H-Output-1
**
*Output, history, variable=PRESELECT,time interval=1.0
*End Step
**  ----------------------------------------------------------  **
**
** STEP: Step-5
**
*Step, name=Step-5, nlgeom=YES
***Dynamic, Explicit
*Dynamic Temperature-displacement, Explicit
	, 20
*Bulk Viscosity
	0.6, 1.2
**
** BOUNDARY CONDITIONS
**
** Name: BC-2 Type: Displacement/Rotation
*Boundary, amplitude=Amp-4
	node_ref, 2, 2, 1
**
** OUTPUT REQUESTS
**
*Restart, write, number interval=1, time marks=NO
**
** FIELD OUTPUT: F-Output-1
**
*Output, field, time interval=1.0
*Node Output
	NT, U, RF
*Element Output, directions=YES
	FV, HFL, LE, PE, PEEQ, PEEQVAVG, PEVAVG, S, SDV, TEMP
**
** HISTORY OUTPUT: H-Output-1
**
*Output, history, variable=PRESELECT,time interval=1.0
*End Step
